<Node dt="0.001">
<RungeKutta2Solver/>
<VisualStyle displayFlags="showBehavior showMapping" />

<Node name="rigid">
<MechanicalObject template="Rigid" translation="2 0.5 0"/>
<PlaneForceField template="Rigid"  normal="0 1 0" d="-5" stiffness="10000" />
<UniformMass template="Rigid" />
<Node name="mapped">
	<MechanicalObject />
	<RegularGridTopology p0="-0.5 -0.5 -0.5"/>
	<MechanicalObject />
	<RigidMapping />
</Node>
</Node>

<Node name="deformable">
<RegularGridTopology />
<MechanicalObject  translation="-2 0 0"/>
<RegularGridSpringForceField />
<UniformMass  />
<PlaneForceField normal="0 1 0" d="-5" stiffness="10000" />
</Node>

</Node>
